<Lems>

    <!--

        This LEMS file has been automatically generated using PyNeuroML v0.5.13 (libNeuroML v0.2.56)

     -->

    <!-- Specify which component to run -->
    <Target component="Sim_HybridTut"/>

    <!-- Include core NeuroML2 ComponentType definitions -->
    <Include file="Cells.xml"/>
    <Include file="Networks.xml"/>
    <Include file="Simulation.xml"/>

    <Include file="HybridTut.net.nml"/>

    <Simulation id="Sim_HybridTut" length="1000.0ms" step="0.01ms" target="HybridTut" seed="12345">  <!-- Note seed: ensures same random numbers used every run -->

        <Display id="DispPop__PYR_HH" title="Membrane potentials of cells in PYR_HH" timeScale="1ms" xmin="-100.0" xmax="1100.0" ymin="-90" ymax="50">
            <Line id="PYR_HH[0]: v" quantity="PYR_HH/0/CELL_HH_PYR/v" scale="1mV" color="#d54f33" timeScale="1ms"/>
            <Line id="PYR_HH[1]: v" quantity="PYR_HH/1/CELL_HH_PYR/v" scale="1mV" color="#0534e4" timeScale="1ms"/>
            <Line id="PYR_HH[2]: v" quantity="PYR_HH/2/CELL_HH_PYR/v" scale="1mV" color="#98e752" timeScale="1ms"/>
            <Line id="PYR_HH[3]: v" quantity="PYR_HH/3/CELL_HH_PYR/v" scale="1mV" color="#bca074" timeScale="1ms"/>
            <Line id="PYR_HH[4]: v" quantity="PYR_HH/4/CELL_HH_PYR/v" scale="1mV" color="#632794" timeScale="1ms"/>
            <Line id="PYR_HH[5]: v" quantity="PYR_HH/5/CELL_HH_PYR/v" scale="1mV" color="#8a5d88" timeScale="1ms"/>
            <Line id="PYR_HH[6]: v" quantity="PYR_HH/6/CELL_HH_PYR/v" scale="1mV" color="#df5954" timeScale="1ms"/>
            <Line id="PYR_HH[7]: v" quantity="PYR_HH/7/CELL_HH_PYR/v" scale="1mV" color="#52c8bf" timeScale="1ms"/>
            <Line id="PYR_HH[8]: v" quantity="PYR_HH/8/CELL_HH_PYR/v" scale="1mV" color="#bf0239" timeScale="1ms"/>
            <Line id="PYR_HH[9]: v" quantity="PYR_HH/9/CELL_HH_PYR/v" scale="1mV" color="#3f9fe8" timeScale="1ms"/>
            <Line id="PYR_HH[10]: v" quantity="PYR_HH/10/CELL_HH_PYR/v" scale="1mV" color="#dda9d2" timeScale="1ms"/>
            <Line id="PYR_HH[11]: v" quantity="PYR_HH/11/CELL_HH_PYR/v" scale="1mV" color="#85ad96" timeScale="1ms"/>
            <Line id="PYR_HH[12]: v" quantity="PYR_HH/12/CELL_HH_PYR/v" scale="1mV" color="#59438f" timeScale="1ms"/>
            <Line id="PYR_HH[13]: v" quantity="PYR_HH/13/CELL_HH_PYR/v" scale="1mV" color="#5fa56f" timeScale="1ms"/>
            <Line id="PYR_HH[14]: v" quantity="PYR_HH/14/CELL_HH_PYR/v" scale="1mV" color="#b5b5a2" timeScale="1ms"/>
            <Line id="PYR_HH[15]: v" quantity="PYR_HH/15/CELL_HH_PYR/v" scale="1mV" color="#2ebe19" timeScale="1ms"/>
            <Line id="PYR_HH[16]: v" quantity="PYR_HH/16/CELL_HH_PYR/v" scale="1mV" color="#d30150" timeScale="1ms"/>
            <Line id="PYR_HH[17]: v" quantity="PYR_HH/17/CELL_HH_PYR/v" scale="1mV" color="#55490a" timeScale="1ms"/>
            <Line id="PYR_HH[18]: v" quantity="PYR_HH/18/CELL_HH_PYR/v" scale="1mV" color="#4bd9d0" timeScale="1ms"/>
            <Line id="PYR_HH[19]: v" quantity="PYR_HH/19/CELL_HH_PYR/v" scale="1mV" color="#69535e" timeScale="1ms"/>
            <Line id="PYR_HH[20]: v" quantity="PYR_HH/20/CELL_HH_PYR/v" scale="1mV" color="#27dae9" timeScale="1ms"/>
            <Line id="PYR_HH[21]: v" quantity="PYR_HH/21/CELL_HH_PYR/v" scale="1mV" color="#6143ed" timeScale="1ms"/>
            <Line id="PYR_HH[22]: v" quantity="PYR_HH/22/CELL_HH_PYR/v" scale="1mV" color="#aee102" timeScale="1ms"/>
            <Line id="PYR_HH[23]: v" quantity="PYR_HH/23/CELL_HH_PYR/v" scale="1mV" color="#a4e245" timeScale="1ms"/>
            <Line id="PYR_HH[24]: v" quantity="PYR_HH/24/CELL_HH_PYR/v" scale="1mV" color="#0c0af9" timeScale="1ms"/>
            <Line id="PYR_HH[25]: v" quantity="PYR_HH/25/CELL_HH_PYR/v" scale="1mV" color="#eaece2" timeScale="1ms"/>
            <Line id="PYR_HH[26]: v" quantity="PYR_HH/26/CELL_HH_PYR/v" scale="1mV" color="#add546" timeScale="1ms"/>
            <Line id="PYR_HH[27]: v" quantity="PYR_HH/27/CELL_HH_PYR/v" scale="1mV" color="#0dc1e8" timeScale="1ms"/>
            <Line id="PYR_HH[28]: v" quantity="PYR_HH/28/CELL_HH_PYR/v" scale="1mV" color="#d4b998" timeScale="1ms"/>
            <Line id="PYR_HH[29]: v" quantity="PYR_HH/29/CELL_HH_PYR/v" scale="1mV" color="#01c4cd" timeScale="1ms"/>
            <Line id="PYR_HH[30]: v" quantity="PYR_HH/30/CELL_HH_PYR/v" scale="1mV" color="#036aae" timeScale="1ms"/>
            <Line id="PYR_HH[31]: v" quantity="PYR_HH/31/CELL_HH_PYR/v" scale="1mV" color="#53de83" timeScale="1ms"/>
            <Line id="PYR_HH[32]: v" quantity="PYR_HH/32/CELL_HH_PYR/v" scale="1mV" color="#5b9557" timeScale="1ms"/>
            <Line id="PYR_HH[33]: v" quantity="PYR_HH/33/CELL_HH_PYR/v" scale="1mV" color="#92b9f4" timeScale="1ms"/>
            <Line id="PYR_HH[34]: v" quantity="PYR_HH/34/CELL_HH_PYR/v" scale="1mV" color="#32f19d" timeScale="1ms"/>
            <Line id="PYR_HH[35]: v" quantity="PYR_HH/35/CELL_HH_PYR/v" scale="1mV" color="#d43d99" timeScale="1ms"/>
            <Line id="PYR_HH[36]: v" quantity="PYR_HH/36/CELL_HH_PYR/v" scale="1mV" color="#36379e" timeScale="1ms"/>
            <Line id="PYR_HH[37]: v" quantity="PYR_HH/37/CELL_HH_PYR/v" scale="1mV" color="#5d01b7" timeScale="1ms"/>
            <Line id="PYR_HH[38]: v" quantity="PYR_HH/38/CELL_HH_PYR/v" scale="1mV" color="#c0004f" timeScale="1ms"/>
            <Line id="PYR_HH[39]: v" quantity="PYR_HH/39/CELL_HH_PYR/v" scale="1mV" color="#771a1c" timeScale="1ms"/>
            <Line id="PYR_HH[40]: v" quantity="PYR_HH/40/CELL_HH_PYR/v" scale="1mV" color="#a8e7b4" timeScale="1ms"/>
            <Line id="PYR_HH[41]: v" quantity="PYR_HH/41/CELL_HH_PYR/v" scale="1mV" color="#149bc7" timeScale="1ms"/>
            <Line id="PYR_HH[42]: v" quantity="PYR_HH/42/CELL_HH_PYR/v" scale="1mV" color="#76f116" timeScale="1ms"/>
            <Line id="PYR_HH[43]: v" quantity="PYR_HH/43/CELL_HH_PYR/v" scale="1mV" color="#3d56b9" timeScale="1ms"/>
            <Line id="PYR_HH[44]: v" quantity="PYR_HH/44/CELL_HH_PYR/v" scale="1mV" color="#ff9a67" timeScale="1ms"/>
            <Line id="PYR_HH[45]: v" quantity="PYR_HH/45/CELL_HH_PYR/v" scale="1mV" color="#6ec96a" timeScale="1ms"/>
            <Line id="PYR_HH[46]: v" quantity="PYR_HH/46/CELL_HH_PYR/v" scale="1mV" color="#5f24e5" timeScale="1ms"/>
            <Line id="PYR_HH[47]: v" quantity="PYR_HH/47/CELL_HH_PYR/v" scale="1mV" color="#83f5a5" timeScale="1ms"/>
            <Line id="PYR_HH[48]: v" quantity="PYR_HH/48/CELL_HH_PYR/v" scale="1mV" color="#de0aae" timeScale="1ms"/>
            <Line id="PYR_HH[49]: v" quantity="PYR_HH/49/CELL_HH_PYR/v" scale="1mV" color="#427e32" timeScale="1ms"/>
        </Display>

        <Display id="DispPop__PYR_Izhi" title="Membrane potentials of cells in PYR_Izhi" timeScale="1ms" xmin="-100.0" xmax="1100.0" ymin="-90" ymax="50">
            <Line id="PYR_Izhi[0]: v" quantity="PYR_Izhi/0/CELL_Izhi_PYR/v" scale="1mV" color="#1544a0" timeScale="1ms"/>
            <Line id="PYR_Izhi[1]: v" quantity="PYR_Izhi/1/CELL_Izhi_PYR/v" scale="1mV" color="#5409ee" timeScale="1ms"/>
            <Line id="PYR_Izhi[2]: v" quantity="PYR_Izhi/2/CELL_Izhi_PYR/v" scale="1mV" color="#9a477d" timeScale="1ms"/>
            <Line id="PYR_Izhi[3]: v" quantity="PYR_Izhi/3/CELL_Izhi_PYR/v" scale="1mV" color="#04ca61" timeScale="1ms"/>
            <Line id="PYR_Izhi[4]: v" quantity="PYR_Izhi/4/CELL_Izhi_PYR/v" scale="1mV" color="#4cf083" timeScale="1ms"/>
            <Line id="PYR_Izhi[5]: v" quantity="PYR_Izhi/5/CELL_Izhi_PYR/v" scale="1mV" color="#754e4b" timeScale="1ms"/>
            <Line id="PYR_Izhi[6]: v" quantity="PYR_Izhi/6/CELL_Izhi_PYR/v" scale="1mV" color="#b30f75" timeScale="1ms"/>
            <Line id="PYR_Izhi[7]: v" quantity="PYR_Izhi/7/CELL_Izhi_PYR/v" scale="1mV" color="#af1648" timeScale="1ms"/>
            <Line id="PYR_Izhi[8]: v" quantity="PYR_Izhi/8/CELL_Izhi_PYR/v" scale="1mV" color="#505fca" timeScale="1ms"/>
            <Line id="PYR_Izhi[9]: v" quantity="PYR_Izhi/9/CELL_Izhi_PYR/v" scale="1mV" color="#c5a380" timeScale="1ms"/>
            <Line id="PYR_Izhi[10]: v" quantity="PYR_Izhi/10/CELL_Izhi_PYR/v" scale="1mV" color="#a5c3f7" timeScale="1ms"/>
            <Line id="PYR_Izhi[11]: v" quantity="PYR_Izhi/11/CELL_Izhi_PYR/v" scale="1mV" color="#06933f" timeScale="1ms"/>
            <Line id="PYR_Izhi[12]: v" quantity="PYR_Izhi/12/CELL_Izhi_PYR/v" scale="1mV" color="#19405e" timeScale="1ms"/>
            <Line id="PYR_Izhi[13]: v" quantity="PYR_Izhi/13/CELL_Izhi_PYR/v" scale="1mV" color="#1f2cf7" timeScale="1ms"/>
            <Line id="PYR_Izhi[14]: v" quantity="PYR_Izhi/14/CELL_Izhi_PYR/v" scale="1mV" color="#e3e5f3" timeScale="1ms"/>
            <Line id="PYR_Izhi[15]: v" quantity="PYR_Izhi/15/CELL_Izhi_PYR/v" scale="1mV" color="#283960" timeScale="1ms"/>
            <Line id="PYR_Izhi[16]: v" quantity="PYR_Izhi/16/CELL_Izhi_PYR/v" scale="1mV" color="#c6b519" timeScale="1ms"/>
            <Line id="PYR_Izhi[17]: v" quantity="PYR_Izhi/17/CELL_Izhi_PYR/v" scale="1mV" color="#5be56f" timeScale="1ms"/>
            <Line id="PYR_Izhi[18]: v" quantity="PYR_Izhi/18/CELL_Izhi_PYR/v" scale="1mV" color="#05febe" timeScale="1ms"/>
            <Line id="PYR_Izhi[19]: v" quantity="PYR_Izhi/19/CELL_Izhi_PYR/v" scale="1mV" color="#bc4a07" timeScale="1ms"/>
            <Line id="PYR_Izhi[20]: v" quantity="PYR_Izhi/20/CELL_Izhi_PYR/v" scale="1mV" color="#6e4273" timeScale="1ms"/>
            <Line id="PYR_Izhi[21]: v" quantity="PYR_Izhi/21/CELL_Izhi_PYR/v" scale="1mV" color="#3e35e3" timeScale="1ms"/>
            <Line id="PYR_Izhi[22]: v" quantity="PYR_Izhi/22/CELL_Izhi_PYR/v" scale="1mV" color="#f6284e" timeScale="1ms"/>
            <Line id="PYR_Izhi[23]: v" quantity="PYR_Izhi/23/CELL_Izhi_PYR/v" scale="1mV" color="#1f8036" timeScale="1ms"/>
            <Line id="PYR_Izhi[24]: v" quantity="PYR_Izhi/24/CELL_Izhi_PYR/v" scale="1mV" color="#07131e" timeScale="1ms"/>
            <Line id="PYR_Izhi[25]: v" quantity="PYR_Izhi/25/CELL_Izhi_PYR/v" scale="1mV" color="#fbcc00" timeScale="1ms"/>
            <Line id="PYR_Izhi[26]: v" quantity="PYR_Izhi/26/CELL_Izhi_PYR/v" scale="1mV" color="#a6ca1f" timeScale="1ms"/>
            <Line id="PYR_Izhi[27]: v" quantity="PYR_Izhi/27/CELL_Izhi_PYR/v" scale="1mV" color="#d776d3" timeScale="1ms"/>
            <Line id="PYR_Izhi[28]: v" quantity="PYR_Izhi/28/CELL_Izhi_PYR/v" scale="1mV" color="#673768" timeScale="1ms"/>
            <Line id="PYR_Izhi[29]: v" quantity="PYR_Izhi/29/CELL_Izhi_PYR/v" scale="1mV" color="#ba83d6" timeScale="1ms"/>
            <Line id="PYR_Izhi[30]: v" quantity="PYR_Izhi/30/CELL_Izhi_PYR/v" scale="1mV" color="#3d1f96" timeScale="1ms"/>
            <Line id="PYR_Izhi[31]: v" quantity="PYR_Izhi/31/CELL_Izhi_PYR/v" scale="1mV" color="#4ca02a" timeScale="1ms"/>
            <Line id="PYR_Izhi[32]: v" quantity="PYR_Izhi/32/CELL_Izhi_PYR/v" scale="1mV" color="#28fbd3" timeScale="1ms"/>
            <Line id="PYR_Izhi[33]: v" quantity="PYR_Izhi/33/CELL_Izhi_PYR/v" scale="1mV" color="#fd629f" timeScale="1ms"/>
            <Line id="PYR_Izhi[34]: v" quantity="PYR_Izhi/34/CELL_Izhi_PYR/v" scale="1mV" color="#54748c" timeScale="1ms"/>
            <Line id="PYR_Izhi[35]: v" quantity="PYR_Izhi/35/CELL_Izhi_PYR/v" scale="1mV" color="#abcdf4" timeScale="1ms"/>
            <Line id="PYR_Izhi[36]: v" quantity="PYR_Izhi/36/CELL_Izhi_PYR/v" scale="1mV" color="#7616c7" timeScale="1ms"/>
            <Line id="PYR_Izhi[37]: v" quantity="PYR_Izhi/37/CELL_Izhi_PYR/v" scale="1mV" color="#6810ad" timeScale="1ms"/>
            <Line id="PYR_Izhi[38]: v" quantity="PYR_Izhi/38/CELL_Izhi_PYR/v" scale="1mV" color="#53bbe9" timeScale="1ms"/>
            <Line id="PYR_Izhi[39]: v" quantity="PYR_Izhi/39/CELL_Izhi_PYR/v" scale="1mV" color="#5354af" timeScale="1ms"/>
            <Line id="PYR_Izhi[40]: v" quantity="PYR_Izhi/40/CELL_Izhi_PYR/v" scale="1mV" color="#939b7d" timeScale="1ms"/>
            <Line id="PYR_Izhi[41]: v" quantity="PYR_Izhi/41/CELL_Izhi_PYR/v" scale="1mV" color="#4cdfbe" timeScale="1ms"/>
            <Line id="PYR_Izhi[42]: v" quantity="PYR_Izhi/42/CELL_Izhi_PYR/v" scale="1mV" color="#2e6290" timeScale="1ms"/>
            <Line id="PYR_Izhi[43]: v" quantity="PYR_Izhi/43/CELL_Izhi_PYR/v" scale="1mV" color="#01b4b5" timeScale="1ms"/>
            <Line id="PYR_Izhi[44]: v" quantity="PYR_Izhi/44/CELL_Izhi_PYR/v" scale="1mV" color="#4b077f" timeScale="1ms"/>
            <Line id="PYR_Izhi[45]: v" quantity="PYR_Izhi/45/CELL_Izhi_PYR/v" scale="1mV" color="#01a175" timeScale="1ms"/>
            <Line id="PYR_Izhi[46]: v" quantity="PYR_Izhi/46/CELL_Izhi_PYR/v" scale="1mV" color="#fdfc6d" timeScale="1ms"/>
            <Line id="PYR_Izhi[47]: v" quantity="PYR_Izhi/47/CELL_Izhi_PYR/v" scale="1mV" color="#5ea53f" timeScale="1ms"/>
            <Line id="PYR_Izhi[48]: v" quantity="PYR_Izhi/48/CELL_Izhi_PYR/v" scale="1mV" color="#31164d" timeScale="1ms"/>
            <Line id="PYR_Izhi[49]: v" quantity="PYR_Izhi/49/CELL_Izhi_PYR/v" scale="1mV" color="#874f89" timeScale="1ms"/>
        </Display>

        <OutputFile id="Volts_file__PYR_HH" fileName="Sim_HybridTut.PYR_HH.v.dat">
            <OutputColumn id="v_PYR_HH_0_CELL_HH_PYR_v" quantity="PYR_HH/0/CELL_HH_PYR/v"/>
            <OutputColumn id="v_PYR_HH_1_CELL_HH_PYR_v" quantity="PYR_HH/1/CELL_HH_PYR/v"/>
            <OutputColumn id="v_PYR_HH_2_CELL_HH_PYR_v" quantity="PYR_HH/2/CELL_HH_PYR/v"/>
            <OutputColumn id="v_PYR_HH_3_CELL_HH_PYR_v" quantity="PYR_HH/3/CELL_HH_PYR/v"/>
            <OutputColumn id="v_PYR_HH_4_CELL_HH_PYR_v" quantity="PYR_HH/4/CELL_HH_PYR/v"/>
            <OutputColumn id="v_PYR_HH_5_CELL_HH_PYR_v" quantity="PYR_HH/5/CELL_HH_PYR/v"/>
            <OutputColumn id="v_PYR_HH_6_CELL_HH_PYR_v" quantity="PYR_HH/6/CELL_HH_PYR/v"/>
            <OutputColumn id="v_PYR_HH_7_CELL_HH_PYR_v" quantity="PYR_HH/7/CELL_HH_PYR/v"/>
            <OutputColumn id="v_PYR_HH_8_CELL_HH_PYR_v" quantity="PYR_HH/8/CELL_HH_PYR/v"/>
            <OutputColumn id="v_PYR_HH_9_CELL_HH_PYR_v" quantity="PYR_HH/9/CELL_HH_PYR/v"/>
            <OutputColumn id="v_PYR_HH_10_CELL_HH_PYR_v" quantity="PYR_HH/10/CELL_HH_PYR/v"/>
            <OutputColumn id="v_PYR_HH_11_CELL_HH_PYR_v" quantity="PYR_HH/11/CELL_HH_PYR/v"/>
            <OutputColumn id="v_PYR_HH_12_CELL_HH_PYR_v" quantity="PYR_HH/12/CELL_HH_PYR/v"/>
            <OutputColumn id="v_PYR_HH_13_CELL_HH_PYR_v" quantity="PYR_HH/13/CELL_HH_PYR/v"/>
            <OutputColumn id="v_PYR_HH_14_CELL_HH_PYR_v" quantity="PYR_HH/14/CELL_HH_PYR/v"/>
            <OutputColumn id="v_PYR_HH_15_CELL_HH_PYR_v" quantity="PYR_HH/15/CELL_HH_PYR/v"/>
            <OutputColumn id="v_PYR_HH_16_CELL_HH_PYR_v" quantity="PYR_HH/16/CELL_HH_PYR/v"/>
            <OutputColumn id="v_PYR_HH_17_CELL_HH_PYR_v" quantity="PYR_HH/17/CELL_HH_PYR/v"/>
            <OutputColumn id="v_PYR_HH_18_CELL_HH_PYR_v" quantity="PYR_HH/18/CELL_HH_PYR/v"/>
            <OutputColumn id="v_PYR_HH_19_CELL_HH_PYR_v" quantity="PYR_HH/19/CELL_HH_PYR/v"/>
            <OutputColumn id="v_PYR_HH_20_CELL_HH_PYR_v" quantity="PYR_HH/20/CELL_HH_PYR/v"/>
            <OutputColumn id="v_PYR_HH_21_CELL_HH_PYR_v" quantity="PYR_HH/21/CELL_HH_PYR/v"/>
            <OutputColumn id="v_PYR_HH_22_CELL_HH_PYR_v" quantity="PYR_HH/22/CELL_HH_PYR/v"/>
            <OutputColumn id="v_PYR_HH_23_CELL_HH_PYR_v" quantity="PYR_HH/23/CELL_HH_PYR/v"/>
            <OutputColumn id="v_PYR_HH_24_CELL_HH_PYR_v" quantity="PYR_HH/24/CELL_HH_PYR/v"/>
            <OutputColumn id="v_PYR_HH_25_CELL_HH_PYR_v" quantity="PYR_HH/25/CELL_HH_PYR/v"/>
            <OutputColumn id="v_PYR_HH_26_CELL_HH_PYR_v" quantity="PYR_HH/26/CELL_HH_PYR/v"/>
            <OutputColumn id="v_PYR_HH_27_CELL_HH_PYR_v" quantity="PYR_HH/27/CELL_HH_PYR/v"/>
            <OutputColumn id="v_PYR_HH_28_CELL_HH_PYR_v" quantity="PYR_HH/28/CELL_HH_PYR/v"/>
            <OutputColumn id="v_PYR_HH_29_CELL_HH_PYR_v" quantity="PYR_HH/29/CELL_HH_PYR/v"/>
            <OutputColumn id="v_PYR_HH_30_CELL_HH_PYR_v" quantity="PYR_HH/30/CELL_HH_PYR/v"/>
            <OutputColumn id="v_PYR_HH_31_CELL_HH_PYR_v" quantity="PYR_HH/31/CELL_HH_PYR/v"/>
            <OutputColumn id="v_PYR_HH_32_CELL_HH_PYR_v" quantity="PYR_HH/32/CELL_HH_PYR/v"/>
            <OutputColumn id="v_PYR_HH_33_CELL_HH_PYR_v" quantity="PYR_HH/33/CELL_HH_PYR/v"/>
            <OutputColumn id="v_PYR_HH_34_CELL_HH_PYR_v" quantity="PYR_HH/34/CELL_HH_PYR/v"/>
            <OutputColumn id="v_PYR_HH_35_CELL_HH_PYR_v" quantity="PYR_HH/35/CELL_HH_PYR/v"/>
            <OutputColumn id="v_PYR_HH_36_CELL_HH_PYR_v" quantity="PYR_HH/36/CELL_HH_PYR/v"/>
            <OutputColumn id="v_PYR_HH_37_CELL_HH_PYR_v" quantity="PYR_HH/37/CELL_HH_PYR/v"/>
            <OutputColumn id="v_PYR_HH_38_CELL_HH_PYR_v" quantity="PYR_HH/38/CELL_HH_PYR/v"/>
            <OutputColumn id="v_PYR_HH_39_CELL_HH_PYR_v" quantity="PYR_HH/39/CELL_HH_PYR/v"/>
            <OutputColumn id="v_PYR_HH_40_CELL_HH_PYR_v" quantity="PYR_HH/40/CELL_HH_PYR/v"/>
            <OutputColumn id="v_PYR_HH_41_CELL_HH_PYR_v" quantity="PYR_HH/41/CELL_HH_PYR/v"/>
            <OutputColumn id="v_PYR_HH_42_CELL_HH_PYR_v" quantity="PYR_HH/42/CELL_HH_PYR/v"/>
            <OutputColumn id="v_PYR_HH_43_CELL_HH_PYR_v" quantity="PYR_HH/43/CELL_HH_PYR/v"/>
            <OutputColumn id="v_PYR_HH_44_CELL_HH_PYR_v" quantity="PYR_HH/44/CELL_HH_PYR/v"/>
            <OutputColumn id="v_PYR_HH_45_CELL_HH_PYR_v" quantity="PYR_HH/45/CELL_HH_PYR/v"/>
            <OutputColumn id="v_PYR_HH_46_CELL_HH_PYR_v" quantity="PYR_HH/46/CELL_HH_PYR/v"/>
            <OutputColumn id="v_PYR_HH_47_CELL_HH_PYR_v" quantity="PYR_HH/47/CELL_HH_PYR/v"/>
            <OutputColumn id="v_PYR_HH_48_CELL_HH_PYR_v" quantity="PYR_HH/48/CELL_HH_PYR/v"/>
            <OutputColumn id="v_PYR_HH_49_CELL_HH_PYR_v" quantity="PYR_HH/49/CELL_HH_PYR/v"/>
        </OutputFile>

        <OutputFile id="Volts_file__PYR_Izhi" fileName="Sim_HybridTut.PYR_Izhi.v.dat">
            <OutputColumn id="v_PYR_Izhi_0_CELL_Izhi_PYR_v" quantity="PYR_Izhi/0/CELL_Izhi_PYR/v"/>
            <OutputColumn id="v_PYR_Izhi_1_CELL_Izhi_PYR_v" quantity="PYR_Izhi/1/CELL_Izhi_PYR/v"/>
            <OutputColumn id="v_PYR_Izhi_2_CELL_Izhi_PYR_v" quantity="PYR_Izhi/2/CELL_Izhi_PYR/v"/>
            <OutputColumn id="v_PYR_Izhi_3_CELL_Izhi_PYR_v" quantity="PYR_Izhi/3/CELL_Izhi_PYR/v"/>
            <OutputColumn id="v_PYR_Izhi_4_CELL_Izhi_PYR_v" quantity="PYR_Izhi/4/CELL_Izhi_PYR/v"/>
            <OutputColumn id="v_PYR_Izhi_5_CELL_Izhi_PYR_v" quantity="PYR_Izhi/5/CELL_Izhi_PYR/v"/>
            <OutputColumn id="v_PYR_Izhi_6_CELL_Izhi_PYR_v" quantity="PYR_Izhi/6/CELL_Izhi_PYR/v"/>
            <OutputColumn id="v_PYR_Izhi_7_CELL_Izhi_PYR_v" quantity="PYR_Izhi/7/CELL_Izhi_PYR/v"/>
            <OutputColumn id="v_PYR_Izhi_8_CELL_Izhi_PYR_v" quantity="PYR_Izhi/8/CELL_Izhi_PYR/v"/>
            <OutputColumn id="v_PYR_Izhi_9_CELL_Izhi_PYR_v" quantity="PYR_Izhi/9/CELL_Izhi_PYR/v"/>
            <OutputColumn id="v_PYR_Izhi_10_CELL_Izhi_PYR_v" quantity="PYR_Izhi/10/CELL_Izhi_PYR/v"/>
            <OutputColumn id="v_PYR_Izhi_11_CELL_Izhi_PYR_v" quantity="PYR_Izhi/11/CELL_Izhi_PYR/v"/>
            <OutputColumn id="v_PYR_Izhi_12_CELL_Izhi_PYR_v" quantity="PYR_Izhi/12/CELL_Izhi_PYR/v"/>
            <OutputColumn id="v_PYR_Izhi_13_CELL_Izhi_PYR_v" quantity="PYR_Izhi/13/CELL_Izhi_PYR/v"/>
            <OutputColumn id="v_PYR_Izhi_14_CELL_Izhi_PYR_v" quantity="PYR_Izhi/14/CELL_Izhi_PYR/v"/>
            <OutputColumn id="v_PYR_Izhi_15_CELL_Izhi_PYR_v" quantity="PYR_Izhi/15/CELL_Izhi_PYR/v"/>
            <OutputColumn id="v_PYR_Izhi_16_CELL_Izhi_PYR_v" quantity="PYR_Izhi/16/CELL_Izhi_PYR/v"/>
            <OutputColumn id="v_PYR_Izhi_17_CELL_Izhi_PYR_v" quantity="PYR_Izhi/17/CELL_Izhi_PYR/v"/>
            <OutputColumn id="v_PYR_Izhi_18_CELL_Izhi_PYR_v" quantity="PYR_Izhi/18/CELL_Izhi_PYR/v"/>
            <OutputColumn id="v_PYR_Izhi_19_CELL_Izhi_PYR_v" quantity="PYR_Izhi/19/CELL_Izhi_PYR/v"/>
            <OutputColumn id="v_PYR_Izhi_20_CELL_Izhi_PYR_v" quantity="PYR_Izhi/20/CELL_Izhi_PYR/v"/>
            <OutputColumn id="v_PYR_Izhi_21_CELL_Izhi_PYR_v" quantity="PYR_Izhi/21/CELL_Izhi_PYR/v"/>
            <OutputColumn id="v_PYR_Izhi_22_CELL_Izhi_PYR_v" quantity="PYR_Izhi/22/CELL_Izhi_PYR/v"/>
            <OutputColumn id="v_PYR_Izhi_23_CELL_Izhi_PYR_v" quantity="PYR_Izhi/23/CELL_Izhi_PYR/v"/>
            <OutputColumn id="v_PYR_Izhi_24_CELL_Izhi_PYR_v" quantity="PYR_Izhi/24/CELL_Izhi_PYR/v"/>
            <OutputColumn id="v_PYR_Izhi_25_CELL_Izhi_PYR_v" quantity="PYR_Izhi/25/CELL_Izhi_PYR/v"/>
            <OutputColumn id="v_PYR_Izhi_26_CELL_Izhi_PYR_v" quantity="PYR_Izhi/26/CELL_Izhi_PYR/v"/>
            <OutputColumn id="v_PYR_Izhi_27_CELL_Izhi_PYR_v" quantity="PYR_Izhi/27/CELL_Izhi_PYR/v"/>
            <OutputColumn id="v_PYR_Izhi_28_CELL_Izhi_PYR_v" quantity="PYR_Izhi/28/CELL_Izhi_PYR/v"/>
            <OutputColumn id="v_PYR_Izhi_29_CELL_Izhi_PYR_v" quantity="PYR_Izhi/29/CELL_Izhi_PYR/v"/>
            <OutputColumn id="v_PYR_Izhi_30_CELL_Izhi_PYR_v" quantity="PYR_Izhi/30/CELL_Izhi_PYR/v"/>
            <OutputColumn id="v_PYR_Izhi_31_CELL_Izhi_PYR_v" quantity="PYR_Izhi/31/CELL_Izhi_PYR/v"/>
            <OutputColumn id="v_PYR_Izhi_32_CELL_Izhi_PYR_v" quantity="PYR_Izhi/32/CELL_Izhi_PYR/v"/>
            <OutputColumn id="v_PYR_Izhi_33_CELL_Izhi_PYR_v" quantity="PYR_Izhi/33/CELL_Izhi_PYR/v"/>
            <OutputColumn id="v_PYR_Izhi_34_CELL_Izhi_PYR_v" quantity="PYR_Izhi/34/CELL_Izhi_PYR/v"/>
            <OutputColumn id="v_PYR_Izhi_35_CELL_Izhi_PYR_v" quantity="PYR_Izhi/35/CELL_Izhi_PYR/v"/>
            <OutputColumn id="v_PYR_Izhi_36_CELL_Izhi_PYR_v" quantity="PYR_Izhi/36/CELL_Izhi_PYR/v"/>
            <OutputColumn id="v_PYR_Izhi_37_CELL_Izhi_PYR_v" quantity="PYR_Izhi/37/CELL_Izhi_PYR/v"/>
            <OutputColumn id="v_PYR_Izhi_38_CELL_Izhi_PYR_v" quantity="PYR_Izhi/38/CELL_Izhi_PYR/v"/>
            <OutputColumn id="v_PYR_Izhi_39_CELL_Izhi_PYR_v" quantity="PYR_Izhi/39/CELL_Izhi_PYR/v"/>
            <OutputColumn id="v_PYR_Izhi_40_CELL_Izhi_PYR_v" quantity="PYR_Izhi/40/CELL_Izhi_PYR/v"/>
            <OutputColumn id="v_PYR_Izhi_41_CELL_Izhi_PYR_v" quantity="PYR_Izhi/41/CELL_Izhi_PYR/v"/>
            <OutputColumn id="v_PYR_Izhi_42_CELL_Izhi_PYR_v" quantity="PYR_Izhi/42/CELL_Izhi_PYR/v"/>
            <OutputColumn id="v_PYR_Izhi_43_CELL_Izhi_PYR_v" quantity="PYR_Izhi/43/CELL_Izhi_PYR/v"/>
            <OutputColumn id="v_PYR_Izhi_44_CELL_Izhi_PYR_v" quantity="PYR_Izhi/44/CELL_Izhi_PYR/v"/>
            <OutputColumn id="v_PYR_Izhi_45_CELL_Izhi_PYR_v" quantity="PYR_Izhi/45/CELL_Izhi_PYR/v"/>
            <OutputColumn id="v_PYR_Izhi_46_CELL_Izhi_PYR_v" quantity="PYR_Izhi/46/CELL_Izhi_PYR/v"/>
            <OutputColumn id="v_PYR_Izhi_47_CELL_Izhi_PYR_v" quantity="PYR_Izhi/47/CELL_Izhi_PYR/v"/>
            <OutputColumn id="v_PYR_Izhi_48_CELL_Izhi_PYR_v" quantity="PYR_Izhi/48/CELL_Izhi_PYR/v"/>
            <OutputColumn id="v_PYR_Izhi_49_CELL_Izhi_PYR_v" quantity="PYR_Izhi/49/CELL_Izhi_PYR/v"/>
        </OutputFile>

    </Simulation>

</Lems>
