<neuroml xmlns="http://www.neuroml.org/schema/neuroml2"  xmlns:xs="http://www.w3.org/2001/XMLSchema" xmlns:xsi="http://www.w3.org/2001/XMLSchema-instance" xsi:schemaLocation="http://www.neuroml.org/schema/neuroml2 https://raw.github.com/NeuroML/NeuroML2/development/Schemas/NeuroML2/NeuroML_v2beta4.xsd" id="M1">
    <notes>NeuroML 2 file exported from NetPyNE v0.4.8</notes>
    <include href="Izhi2007b.cell.nml"></include>
    <include href="Izhi2007b.cell.nml"></include>
    <include href="Izhi2007b.cell.nml"></include>
    <include href="Izhi2007b.cell.nml"></include>
    <include href="Izhi2007b.cell.nml"></include>
    <include href="Izhi2007b.cell.nml"></include>
    <include href="Izhi2007b.cell.nml"></include>
    <include href="Izhi2007b.cell.nml"></include>
    <include href="Izhi2007b.cell.nml"></include>
    <include href="Izhi2007b.cell.nml"></include>
    <include href="Izhi2007b.cell.nml"></include>
    <include href="Izhi2007b.cell.nml"></include>
    <include href="Izhi2007b.cell.nml"></include>
    <expTwoSynapse id="AMPA" gbase="1uS" erev="0mV" tauDecay="5.3ms" tauRise="0.05ms"/>
    <expTwoSynapse id="NMDA" gbase="1uS" erev="0mV" tauDecay="1.5ms" tauRise="0.15ms"/>
    <expTwoSynapse id="GABAA" gbase="1uS" erev="-80mV" tauDecay="9.1ms" tauRise="0.07ms"/>
    <expTwoSynapse id="GABAB" gbase="1uS" erev="-80mV" tauDecay="9.1ms" tauRise="0.07ms"/>
    <spikeGeneratorPoisson id="NetStim_background_E_IT_L6_20_1_NMDA" averageRate="20 Hz"/>
    <spikeGeneratorPoisson id="NetStim_background_I_PV_L6_20_1_NMDA" averageRate="20 Hz"/>
    <spikeGeneratorPoisson id="NetStim_background_E_IT_L5B_20_1_NMDA" averageRate="20 Hz"/>
    <spikeGeneratorPoisson id="NetStim_background_I_SOM_L23_20_1_NMDA" averageRate="20 Hz"/>
    <spikeGeneratorPoisson id="NetStim_background_E_PT_L5B_20_1_NMDA" averageRate="20 Hz"/>
    <spikeGeneratorPoisson id="NetStim_background_E_IT_L4_20_1_NMDA" averageRate="20 Hz"/>
    <spikeGeneratorPoisson id="NetStim_background_I_PV_L23_20_1_NMDA" averageRate="20 Hz"/>
    <spikeGeneratorPoisson id="NetStim_background_I_SOM_L6_20_1_NMDA" averageRate="20 Hz"/>
    <spikeGeneratorPoisson id="NetStim_background_E_CT_L6_20_1_NMDA" averageRate="20 Hz"/>
    <spikeGeneratorPoisson id="NetStim_background_E_IT_L23_20_1_NMDA" averageRate="20 Hz"/>
    <spikeGeneratorPoisson id="NetStim_background_I_SOM_L5_20_1_NMDA" averageRate="20 Hz"/>
    <spikeGeneratorPoisson id="NetStim_background_E_IT_L5A_20_1_NMDA" averageRate="20 Hz"/>
    <spikeGeneratorPoisson id="NetStim_background_I_PV_L5_20_1_NMDA" averageRate="20 Hz"/>
    <network id="M1">
        <population id="IT_L23" component="Izhi2007b" size="20" type="populationList">
            <instance id="0">
                <location x="39.416065709118584" y="207.149427575435681" z="6.507577134354995"/>
            </instance>
            <instance id="1">
                <location x="10.089444221431975" y="250.604999109187446" z="7.888632563009407"/>
            </instance>
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        </population>
        <population id="IT_L4" component="Izhi2007b" size="10" type="populationList">
            <instance id="0">
                <location x="50.984373601787183" y="421.09506472957446" z="4.132888600877603"/>
            </instance>
            <instance id="1">
                <location x="69.753574283981706" y="476.948345457690493" z="7.878331269264089"/>
            </instance>
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        </population>
        <population id="IT_L5A" component="Izhi2007b" size="11" type="populationList">
            <instance id="0">
                <location x="9.221748790030516" y="659.784179522022214" z="1.919888997929358"/>
            </instance>
            <instance id="1">
                <location x="80.796708487497227" y="581.071579239752737" z="3.759862583025634"/>
            </instance>
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        </population>
        <population id="IT_L5B" component="Izhi2007b" size="13" type="populationList">
            <instance id="0">
                <location x="28.200601803623325" y="801.456328125827099" z="7.537023000027721"/>
            </instance>
            <instance id="1">
                <location x="34.824359097868665" y="925.705857593283213" z="0.888283887320873"/>
            </instance>
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        </population>
        <population id="PT_L5B" component="Izhi2007b" size="13" type="populationList">
            <instance id="0">
                <location x="28.200601803623325" y="801.456328125827099" z="7.537023000027721"/>
            </instance>
            <instance id="1">
                <location x="34.824359097868665" y="925.705857593283213" z="0.888283887320873"/>
            </instance>
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        </population>
        <population id="IT_L6" component="Izhi2007b" size="12" type="populationList">
            <instance id="0">
                <location x="27.792687326834464" y="1187.609631264625705" z="3.452388087502297"/>
            </instance>
            <instance id="1">
                <location x="23.963281602470666" y="1135.723672754426843" z="1.183131195439157"/>
            </instance>
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        </population>
        <population id="CT_L6" component="Izhi2007b" size="12" type="populationList">
            <instance id="0">
                <location x="27.792687326834464" y="1187.609631264625705" z="3.452388087502297"/>
            </instance>
            <instance id="1">
                <location x="23.963281602470666" y="1135.723672754426843" z="1.183131195439157"/>
            </instance>
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        </population>
        <population id="PV_L23" component="Izhi2007b" size="2" type="populationList">
            <instance id="0">
                <location x="93.870444460582661" y="315.858921881640413" z="4.442593851802188"/>
            </instance>
            <instance id="1">
                <location x="97.282513718989662" y="184.651630048513539" z="1.291077779756855"/>
            </instance>
        </population>
        <population id="SOM_L23" component="Izhi2007b" size="2" type="populationList">
            <instance id="0">
                <location x="93.870444460582661" y="315.858921881640413" z="4.442593851802188"/>
            </instance>
            <instance id="1">
                <location x="97.282513718989662" y="184.651630048513539" z="1.291077779756855"/>
            </instance>
        </population>
        <population id="PV_L5" component="Izhi2007b" size="6" type="populationList">
            <instance id="0">
                <location x="75.808601565255302" y="1001.085801627389969" z="8.444980365946611"/>
            </instance>
            <instance id="1">
                <location x="12.871938171326081" y="1029.743711125887558" z="9.420159775120178"/>
            </instance>
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        </population>
        <population id="SOM_L5" component="Izhi2007b" size="6" type="populationList">
            <instance id="0">
                <location x="75.808601565255302" y="1001.085801627389969" z="8.444980365946611"/>
            </instance>
            <instance id="1">
                <location x="12.871938171326081" y="1029.743711125887558" z="9.420159775120178"/>
            </instance>
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        </population>
        <population id="PV_L6" component="Izhi2007b" size="3" type="populationList">
            <instance id="0">
                <location x="91.711585874816009" y="1233.287161713237765" z="1.861602375166967"/>
            </instance>
            <instance id="1">
                <location x="67.115838414070012" y="1153.517354412397026" z="8.864825786998646"/>
            </instance>
            <instance id="2">
                <location x="51.804630571516853" y="1144.644860411036007" z="7.624642933995156"/>
            </instance>
        </population>
        <population id="SOM_L6" component="Izhi2007b" size="3" type="populationList">
            <instance id="0">
                <location x="91.711585874816009" y="1233.287161713237765" z="1.861602375166967"/>
            </instance>
            <instance id="1">
                <location x="67.115838414070012" y="1153.517354412397026" z="8.864825786998646"/>
            </instance>
            <instance id="2">
                <location x="51.804630571516853" y="1144.644860411036007" z="7.624642933995156"/>
            </instance>
        </population>
        <population id="Pop_NetStim_background_E_IT_L6_20_1_NMDA" component="NetStim_background_E_IT_L6_20_1_NMDA" size="12"/>
        <population id="Pop_NetStim_background_I_PV_L6_20_1_NMDA" component="NetStim_background_I_PV_L6_20_1_NMDA" size="3"/>
        <population id="Pop_NetStim_background_E_IT_L5B_20_1_NMDA" component="NetStim_background_E_IT_L5B_20_1_NMDA" size="13"/>
        <population id="Pop_NetStim_background_I_SOM_L23_20_1_NMDA" component="NetStim_background_I_SOM_L23_20_1_NMDA" size="2"/>
        <population id="Pop_NetStim_background_E_PT_L5B_20_1_NMDA" component="NetStim_background_E_PT_L5B_20_1_NMDA" size="13"/>
        <population id="Pop_NetStim_background_E_IT_L4_20_1_NMDA" component="NetStim_background_E_IT_L4_20_1_NMDA" size="10"/>
        <population id="Pop_NetStim_background_I_PV_L23_20_1_NMDA" component="NetStim_background_I_PV_L23_20_1_NMDA" size="2"/>
        <population id="Pop_NetStim_background_I_SOM_L6_20_1_NMDA" component="NetStim_background_I_SOM_L6_20_1_NMDA" size="3"/>
        <population id="Pop_NetStim_background_E_CT_L6_20_1_NMDA" component="NetStim_background_E_CT_L6_20_1_NMDA" size="12"/>
        <population id="Pop_NetStim_background_E_IT_L23_20_1_NMDA" component="NetStim_background_E_IT_L23_20_1_NMDA" size="19"/>
        <population id="Pop_NetStim_background_I_SOM_L5_20_1_NMDA" component="NetStim_background_I_SOM_L5_20_1_NMDA" size="6"/>
        <population id="Pop_NetStim_background_E_IT_L5A_20_1_NMDA" component="NetStim_background_E_IT_L5A_20_1_NMDA" size="11"/>
        <population id="Pop_NetStim_background_I_PV_L5_20_1_NMDA" component="NetStim_background_I_PV_L5_20_1_NMDA" size="6"/>
        <projection id="NetConn_NetStim_background_E_IT_L6_20_1_NMDA__IT_L6" presynapticPopulation="Pop_NetStim_background_E_IT_L6_20_1_NMDA" postsynapticPopulation="IT_L6" synapse="NMDA">
            <connectionWD id="0" preCellId="../Pop_NetStim_background_E_IT_L6_20_1_NMDA[0]" postCellId="../IT_L6/0/Izhi2007b" weight="0.1" delay="9.27512971867 ms"/>
            <connectionWD id="1" preCellId="../Pop_NetStim_background_E_IT_L6_20_1_NMDA[1]" postCellId="../IT_L6/1/Izhi2007b" weight="0.1" delay="2.41043680368 ms"/>
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        </projection>
        <projection id="NetConn_NetStim_background_I_PV_L6_20_1_NMDA__PV_L6" presynapticPopulation="Pop_NetStim_background_I_PV_L6_20_1_NMDA" postsynapticPopulation="PV_L6" synapse="NMDA">
            <connectionWD id="0" preCellId="../Pop_NetStim_background_I_PV_L6_20_1_NMDA[0]" postCellId="../PV_L6/0/Izhi2007b" weight="0.1" delay="1.13508929095 ms"/>
            <connectionWD id="1" preCellId="../Pop_NetStim_background_I_PV_L6_20_1_NMDA[1]" postCellId="../PV_L6/1/Izhi2007b" weight="0.1" delay="9.40899242792 ms"/>
            <connectionWD id="2" preCellId="../Pop_NetStim_background_I_PV_L6_20_1_NMDA[2]" postCellId="../PV_L6/2/Izhi2007b" weight="0.1" delay="6.21789145125 ms"/>
        </projection>
        <projection id="NetConn_NetStim_background_E_IT_L5B_20_1_NMDA__IT_L5B" presynapticPopulation="Pop_NetStim_background_E_IT_L5B_20_1_NMDA" postsynapticPopulation="IT_L5B" synapse="NMDA">
            <connectionWD id="0" preCellId="../Pop_NetStim_background_E_IT_L5B_20_1_NMDA[0]" postCellId="../IT_L5B/0/Izhi2007b" weight="0.1" delay="7.38774182591 ms"/>
            <connectionWD id="1" preCellId="../Pop_NetStim_background_E_IT_L5B_20_1_NMDA[1]" postCellId="../IT_L5B/1/Izhi2007b" weight="0.1" delay="5.39241840842 ms"/>
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        </projection>
        <projection id="NetConn_NetStim_background_I_SOM_L23_20_1_NMDA__SOM_L23" presynapticPopulation="Pop_NetStim_background_I_SOM_L23_20_1_NMDA" postsynapticPopulation="SOM_L23" synapse="NMDA">
            <connectionWD id="0" preCellId="../Pop_NetStim_background_I_SOM_L23_20_1_NMDA[0]" postCellId="../SOM_L23/0/Izhi2007b" weight="0.03" delay="8.15620560158 ms"/>
            <connectionWD id="1" preCellId="../Pop_NetStim_background_I_SOM_L23_20_1_NMDA[1]" postCellId="../SOM_L23/1/Izhi2007b" weight="0.03" delay="10.3947409642 ms"/>
        </projection>
        <projection id="NetConn_NetStim_background_E_PT_L5B_20_1_NMDA__PT_L5B" presynapticPopulation="Pop_NetStim_background_E_PT_L5B_20_1_NMDA" postsynapticPopulation="PT_L5B" synapse="NMDA">
            <connectionWD id="0" preCellId="../Pop_NetStim_background_E_PT_L5B_20_1_NMDA[0]" postCellId="../PT_L5B/0/Izhi2007b" weight="0.1" delay="6.49360007866 ms"/>
            <connectionWD id="1" preCellId="../Pop_NetStim_background_E_PT_L5B_20_1_NMDA[1]" postCellId="../PT_L5B/1/Izhi2007b" weight="0.1" delay="1.27422268705 ms"/>
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        </projection>
        <projection id="NetConn_NetStim_background_E_IT_L4_20_1_NMDA__IT_L4" presynapticPopulation="Pop_NetStim_background_E_IT_L4_20_1_NMDA" postsynapticPopulation="IT_L4" synapse="NMDA">
            <connectionWD id="0" preCellId="../Pop_NetStim_background_E_IT_L4_20_1_NMDA[0]" postCellId="../IT_L4/0/Izhi2007b" weight="0.1" delay="2.22518069243 ms"/>
            <connectionWD id="1" preCellId="../Pop_NetStim_background_E_IT_L4_20_1_NMDA[1]" postCellId="../IT_L4/1/Izhi2007b" weight="0.1" delay="5.09255587901 ms"/>
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        </projection>
        <projection id="NetConn_NetStim_background_I_PV_L23_20_1_NMDA__PV_L23" presynapticPopulation="Pop_NetStim_background_I_PV_L23_20_1_NMDA" postsynapticPopulation="PV_L23" synapse="NMDA">
            <connectionWD id="0" preCellId="../Pop_NetStim_background_I_PV_L23_20_1_NMDA[0]" postCellId="../PV_L23/0/Izhi2007b" weight="0.1" delay="2.46936545901 ms"/>
            <connectionWD id="1" preCellId="../Pop_NetStim_background_I_PV_L23_20_1_NMDA[1]" postCellId="../PV_L23/1/Izhi2007b" weight="0.1" delay="1.94780133126 ms"/>
        </projection>
        <projection id="NetConn_NetStim_background_I_SOM_L6_20_1_NMDA__SOM_L6" presynapticPopulation="Pop_NetStim_background_I_SOM_L6_20_1_NMDA" postsynapticPopulation="SOM_L6" synapse="NMDA">
            <connectionWD id="0" preCellId="../Pop_NetStim_background_I_SOM_L6_20_1_NMDA[0]" postCellId="../SOM_L6/0/Izhi2007b" weight="0.03" delay="0.0663921986151 ms"/>
            <connectionWD id="1" preCellId="../Pop_NetStim_background_I_SOM_L6_20_1_NMDA[1]" postCellId="../SOM_L6/1/Izhi2007b" weight="0.03" delay="4.89688106531 ms"/>
            <connectionWD id="2" preCellId="../Pop_NetStim_background_I_SOM_L6_20_1_NMDA[2]" postCellId="../SOM_L6/2/Izhi2007b" weight="0.03" delay="6.76140931076 ms"/>
        </projection>
        <projection id="NetConn_NetStim_background_E_CT_L6_20_1_NMDA__CT_L6" presynapticPopulation="Pop_NetStim_background_E_CT_L6_20_1_NMDA" postsynapticPopulation="CT_L6" synapse="NMDA">
            <connectionWD id="0" preCellId="../Pop_NetStim_background_E_CT_L6_20_1_NMDA[0]" postCellId="../CT_L6/0/Izhi2007b" weight="0.1" delay="1.33977436834 ms"/>
            <connectionWD id="1" preCellId="../Pop_NetStim_background_E_CT_L6_20_1_NMDA[1]" postCellId="../CT_L6/1/Izhi2007b" weight="0.1" delay="1.16753981271 ms"/>
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        </projection>
        <projection id="NetConn_NetStim_background_E_IT_L23_20_1_NMDA__IT_L23" presynapticPopulation="Pop_NetStim_background_E_IT_L23_20_1_NMDA" postsynapticPopulation="IT_L23" synapse="NMDA">
            <connectionWD id="0" preCellId="../Pop_NetStim_background_E_IT_L23_20_1_NMDA[0]" postCellId="../IT_L23/0/Izhi2007b" weight="0.1" delay="3.40611679744 ms"/>
            <connectionWD id="1" preCellId="../Pop_NetStim_background_E_IT_L23_20_1_NMDA[1]" postCellId="../IT_L23/1/Izhi2007b" weight="0.1" delay="5.32155049593 ms"/>
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        </projection>
        <projection id="NetConn_NetStim_background_I_SOM_L5_20_1_NMDA__SOM_L5" presynapticPopulation="Pop_NetStim_background_I_SOM_L5_20_1_NMDA" postsynapticPopulation="SOM_L5" synapse="NMDA">
            <connectionWD id="0" preCellId="../Pop_NetStim_background_I_SOM_L5_20_1_NMDA[0]" postCellId="../SOM_L5/0/Izhi2007b" weight="0.03" delay="2.84029725973 ms"/>
            <connectionWD id="1" preCellId="../Pop_NetStim_background_I_SOM_L5_20_1_NMDA[1]" postCellId="../SOM_L5/1/Izhi2007b" weight="0.03" delay="3.8994842763 ms"/>
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        </projection>
        <projection id="NetConn_NetStim_background_E_IT_L5A_20_1_NMDA__IT_L5A" presynapticPopulation="Pop_NetStim_background_E_IT_L5A_20_1_NMDA" postsynapticPopulation="IT_L5A" synapse="NMDA">
            <connectionWD id="0" preCellId="../Pop_NetStim_background_E_IT_L5A_20_1_NMDA[0]" postCellId="../IT_L5A/0/Izhi2007b" weight="0.1" delay="0.722501474039 ms"/>
            <connectionWD id="1" preCellId="../Pop_NetStim_background_E_IT_L5A_20_1_NMDA[1]" postCellId="../IT_L5A/1/Izhi2007b" weight="0.1" delay="7.97255721338 ms"/>
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        </projection>
        <projection id="NetConn_NetStim_background_I_PV_L5_20_1_NMDA__PV_L5" presynapticPopulation="Pop_NetStim_background_I_PV_L5_20_1_NMDA" postsynapticPopulation="PV_L5" synapse="NMDA">
            <connectionWD id="0" preCellId="../Pop_NetStim_background_I_PV_L5_20_1_NMDA[0]" postCellId="../PV_L5/0/Izhi2007b" weight="0.1" delay="-1.0846090617 ms"/>
            <connectionWD id="1" preCellId="../Pop_NetStim_background_I_PV_L5_20_1_NMDA[1]" postCellId="../PV_L5/1/Izhi2007b" weight="0.1" delay="8.61731218728 ms"/>
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        </projection>
    </network>
</neuroml>
